22.09.2023
08:09
$PROBLEM From bbr: see 2.yaml for details

$INPUT ID BW DOSE TIME DV AMT MDV CMT NUM

$DATA ../../../../data/derived/nonmemdata.csv
      IGNORE="

$SUBROUTINE ADVAN2 TRANS2

$PK
TVCL = THETA(1)           ; Typical Value of Clearance
CL   = TVCL * EXP(ETA(1)) ; Individual Clearance (L/h)

TVV = THETA(2)          ; Typical Value of Volume
V   = TVV * EXP(ETA(2)) ; Individual value of Volume (L)

TVKA = THETA(3)           ; Typical Value of absorption rate
KA   = TVKA * EXP(ETA(3)) ; Individual value of Ka (1/h)

F1 = 1 ; Bioavailability
S2 = V ;

$ERROR (OBSERVATION ONLY)
IPRED = F
Y=IPRED*(1+EPS(2)) + EPS(1) ; additive+proportional error

$THETA
(0, 1)   ; [L/day] CL/F
(0, 20)  ; [L] V/F
(0, 1)   ; [1/h] KA

$OMEGA
0.1      ;[P] CL/F
0.1      ;[P] V/F
0.1      ;[P] KA

$SIGMA
1      ;[P] add
0.1    ;[P] prop

$EST MAXEVAL=9999 METHOD=1 INTER SIGL=6 NSIG=3 PRINT=1 MSFO=./2.msf
$COV PRINT=E MATRIX=R

$TABLE NUM ID TIME EVID MDV CMT PRED IPRED CWRES WRES NPDE NOPRINT NOAPPEND ONEHEADERALL
FILE=sdtab2.tab
$TABLE NUM ID ETAS(1:LAST) KA CL V NOPRINT NOAPPEND ONEHEADERALL
FILE=patab2.tab

NM-TRAN MESSAGES
 WARNINGS AND ERRORS (IF ANY) FOR PROBLEM    1
 (WARNING  2) NM-TRAN INFERS THAT THE DATA ARE POPULATION.
 LIM VALUES MAXLIM ASSESSED BY NMTRAN: 1,2,3,4,5,6,7,8,10,11,13,15,16

1NONLINEAR MIXED EFFECTS MODEL PROGRAM (NONMEM) VERSION 7.4.4
 ORIGINALLY DEVELOPED BY STUART BEAL, LEWIS SHEINER, AND ALISON BOECKMANN
 CURRENT DEVELOPERS ARE ROBERT BAUER, ICON DEVELOPMENT SOLUTIONS,
 AND ALISON BOECKMANN. IMPLEMENTATION, EFFICIENCY, AND STANDARDIZATION
 PERFORMED BY NOUS INFOSYSTEMS.
 PROBLEM NO.:         1
 From bbr: see 2.yaml for details
 TOT. NO. OF OBS RECS:      132
 TOT. NO. OF INDIVIDUALS:       12
 ONE COMPARTMENT MODEL WITH FIRST-ORDER ABSORPTION (ADVAN2)
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 #TBLN:      1
 #METH: First Order Conditional Estimation with Interaction
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
 #TERM:
0MINIMIZATION SUCCESSFUL
 NO. OF FUNCTION EVALUATIONS USED:      228
 NO. OF SIG. DIGITS IN FINAL EST.:  3.5

 ETABAR IS THE ARITHMETIC MEAN OF THE ETA-ESTIMATES,
 AND THE P-VALUE IS GIVEN FOR THE NULL HYPOTHESIS THAT THE TRUE MEAN IS 0.

 ETABAR:         1.6659E-03 -5.4040E-03 -1.3661E-02
 SE:             6.9386E-02  2.9324E-02  1.6898E-01
 N:                      12          12          12

 P VAL.:         9.8084E-01  8.5379E-01  9.3557E-01

 ETASHRINKSD(%)  1.2098E+00  1.5660E+01  2.1810E+00
 ETASHRINKVR(%)  2.4050E+00  2.8868E+01  4.3145E+00
 EBVSHRINKSD(%)  4.9198E+00  1.9053E+01  4.5429E+00
 EBVSHRINKVR(%)  9.5975E+00  3.4477E+01  8.8794E+00
 EPSSHRINKSD(%)  1.1456E+01  1.0922E+01
 EPSSHRINKVR(%)  2.1599E+01  2.0651E+01


 TOTAL DATA POINTS NORMALLY DISTRIBUTED (N):          132
 N*LOG(2PI) CONSTANT TO OBJECTIVE FUNCTION:    242.59977276603360
 OBJECTIVE FUNCTION VALUE WITHOUT CONSTANT:    104.32208771244383
 OBJECTIVE FUNCTION VALUE WITH CONSTANT:       346.92186047847741
 REPORTED OBJECTIVE FUNCTION DOES NOT CONTAIN CONSTANT

 TOTAL EFFECTIVE ETAS (NIND*NETA):                            36


 #TERE:
 Elapsed estimation  time in seconds:     0.80
 Elapsed covariance  time in seconds:     0.15
 Elapsed postprocess time in seconds:     0.04

 ********************               FIRST ORDER CONDITIONAL ESTIMATION WITH INTERACTION              ********************
 #OBJT:**************                       MINIMUM VALUE OF OBJECTIVE FUNCTION                      ********************
 #OBJV:********************************************      104.322       **************************************************

 ********************               FIRST ORDER CONDITIONAL ESTIMATION WITH INTERACTION              ********************
 ********************                             FINAL PARAMETER ESTIMATE                           ********************

 THETA - VECTOR OF FIXED EFFECTS PARAMETERS   *********
         TH 1      TH 2      TH 3
         2.79E+00  3.20E+01  1.48E+00

 OMEGA - COV MATRIX FOR RANDOM EFFECTS - ETAS  ********
         ETA1      ETA2      ETA3
 ETA1
+        6.46E-02
 ETA2
+        0.00E+00  1.58E-02
 ETA3
+        0.00E+00  0.00E+00  3.91E-01

 SIGMA - COV MATRIX FOR RANDOM EFFECTS - EPSILONS  ****
         EPS1      EPS2
 EPS1
+        7.59E-02
 EPS2
+        0.00E+00  1.79E-02

 OMEGA - CORR MATRIX FOR RANDOM EFFECTS - ETAS  *******
         ETA1      ETA2      ETA3
 ETA1
+        2.54E-01
 ETA2
+        0.00E+00  1.26E-01
 ETA3
+        0.00E+00  0.00E+00  6.25E-01

 SIGMA - CORR MATRIX FOR RANDOM EFFECTS - EPSILONS  ***
         EPS1      EPS2
 EPS1
+        2.76E-01
 EPS2
+        0.00E+00  1.34E-01

 ********************               FIRST ORDER CONDITIONAL ESTIMATION WITH INTERACTION              ********************
 ********************                            STANDARD ERROR OF ESTIMATE                          ********************

 THETA - VECTOR OF FIXED EFFECTS PARAMETERS   *********
         TH 1      TH 2      TH 3
         2.15E-01  1.45E+00  2.82E-01

 OMEGA - COV MATRIX FOR RANDOM EFFECTS - ETAS  ********
         ETA1      ETA2      ETA3
 ETA1
+        2.97E-02
 ETA2
+       .........  1.04E-02
 ETA3
+       ......... .........  1.85E-01

 SIGMA - COV MATRIX FOR RANDOM EFFECTS - EPSILONS  ****
         EPS1      EPS2
 EPS1
+        4.09E-02
 EPS2
+       .........  4.64E-03

 OMEGA - CORR MATRIX FOR RANDOM EFFECTS - ETAS  *******
         ETA1      ETA2      ETA3
 ETA1
+        5.84E-02
 ETA2
+       .........  4.15E-02
 ETA3
+       ......... .........  1.48E-01

 SIGMA - CORR MATRIX FOR RANDOM EFFECTS - EPSILONS  ***
         EPS1      EPS2
 EPS1
+        7.42E-02
 EPS2
+       .........  1.73E-02

 ********************               FIRST ORDER CONDITIONAL ESTIMATION WITH INTERACTION              ********************
 ********************                          COVARIANCE MATRIX OF ESTIMATE                         ********************

            TH 1      TH 2      TH 3      OM11      OM12      OM13      OM22      OM23      OM33      SG11      SG12      SG22
 TH 1
+        4.63E-02
 TH 2
+       -1.30E-02  2.11E+00
 TH 3
+       -1.34E-03  5.32E-02  7.96E-02
 OM11
+       -3.66E-05 -6.83E-05  2.68E-05  8.80E-04
 OM12
+       ......... ......... ......... ......... .........
 OM13
+       ......... ......... ......... ......... ......... .........
 OM22
+       -1.45E-05  8.12E-04  9.94E-05 -2.15E-05 ......... .........  1.09E-04
 OM23
+       ......... ......... ......... ......... ......... ......... ......... .........
 OM33
+       -6.38E-05  8.94E-04  3.05E-03 -3.84E-05 ......... .........  1.59E-04 .........  3.44E-02
 SG11
+       -1.55E-04 -2.59E-03  4.19E-04  8.03E-05 ......... .........  1.90E-05 ......... -8.30E-05  1.67E-03
 SG12
+       ......... ......... ......... ......... ......... ......... ......... ......... ......... ......... .........
 SG22
+        3.83E-05  5.50E-04 -5.66E-05 -8.55E-06 ......... ......... -7.13E-06 ......... -4.36E-05 -1.22E-04 .........  2.16E-05

 ********************               FIRST ORDER CONDITIONAL ESTIMATION WITH INTERACTION              ********************
 ********************                          CORRELATION MATRIX OF ESTIMATE                        ********************

            TH 1      TH 2      TH 3      OM11      OM12      OM13      OM22      OM23      OM33      SG11      SG12      SG22
 TH 1
+        2.15E-01
 TH 2
+       -4.17E-02  1.45E+00
 TH 3
+       -2.21E-02  1.30E-01  2.82E-01
 OM11
+       -5.73E-03 -1.58E-03  3.20E-03  2.97E-02
 OM12
+       ......... ......... ......... ......... .........
 OM13
+       ......... ......... ......... ......... ......... .........
 OM22
+       -6.44E-03  5.35E-02  3.37E-02 -6.94E-02 ......... .........  1.04E-02
 OM23
+       ......... ......... ......... ......... ......... ......... ......... .........
 OM33
+       -1.60E-03  3.32E-03  5.83E-02 -6.99E-03 ......... .........  8.23E-02 .........  1.85E-01
 SG11
+       -1.76E-02 -4.36E-02  3.64E-02  6.63E-02 ......... .........  4.44E-02 ......... -1.10E-02  4.09E-02
 SG12
+       ......... ......... ......... ......... ......... ......... ......... ......... ......... ......... .........
 SG22
+        3.83E-02  8.14E-02 -4.32E-02 -6.21E-02 ......... ......... -1.47E-01 ......... -5.07E-02 -6.40E-01 .........  4.64E-03
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
 ********************               FIRST ORDER CONDITIONAL ESTIMATION WITH INTERACTION              ********************
 ********************                      EIGENVALUES OF COR MATRIX OF ESTIMATE                     ********************

             1         2         3         4         5         6         7         8
         3.47E-01  8.22E-01  9.03E-01  9.72E-01  9.95E-01  1.07E+00  1.20E+00  1.69E+00
 Elapsed finaloutput time in seconds:     0.03
 #CPUT: Total CPU Time in Seconds,        0.406
